// SBML level 3 version 2
// Generated by Harmonia — DO NOT HAND-EDIT (regenerated from dataset/ in CI).
// PROHIBITED — research / safety-methodology / education only; not a regulatory determination
// This model is a REDUCED reference kernel of the O'Hara-Rudy lineage; it is
// research / education infrastructure, not a regulatory or clinical tool.
// Primary sources: https://doi.org/10.1371/journal.pcbi.1002061

model harmonia_ord()
  // model units - time: ms

  // Parameters:
  Cm = 1 uF_per_cm2;
  ENa = 70 mV;
  EK = -87 mV;
  EKs = -80 mV;
  ECaL = 45 mV;
  ENCX = -10 mV;
  gNa = 11 mS_per_uF;
  gNaL = 0.06 mS_per_uF;
  gto = 0.18 mS_per_uF;
  gCaL = 0.14 mS_per_uF;
  gKr = 0.3 mS_per_uF;
  gKs = 0.045 mS_per_uF;
  gK1 = 0.34 mS_per_uF;
  gNaCa = 0.03 mS_per_uF;
  stim_amplitude = -52 uA_per_uF;
  stim_duration = 1 ms;
  stim_period = 2000 ms;
  block_INa = 1 dimensionless;
  block_INaL = 1 dimensionless;
  block_Ito = 1 dimensionless;
  block_ICaL = 1 dimensionless;
  block_IKr = 1 dimensionless;
  block_IKs = 1 dimensionless;
  V = -85 mV;
  m = 0.003172683 dimensionless;
  h = 0.9378644 dimensionless;
  j = 0.9378644 dimensionless;
  mL = 0.005220126 dimensionless;
  hL = 0.5 dimensionless;
  a = 0.003937228 dimensionless;
  iF = 0.9964064 dimensionless;
  d = 1.913324e-6 dimensionless;
  f = 0.9997616 dimensionless;
  xr = 0.0002959571 dimensionless;
  xs = 0.008279044 dimensionless;
  m_inf has dimensionless;
  m_tau has ms;
  h_inf has dimensionless;
  h_tau has ms;
  j_inf has dimensionless;
  j_tau has ms;
  mL_inf has dimensionless;
  mL_tau has ms;
  hL_inf has dimensionless;
  hL_tau has ms;
  a_inf has dimensionless;
  a_tau has ms;
  iF_inf has dimensionless;
  iF_tau has ms;
  d_inf has dimensionless;
  d_tau has ms;
  f_inf has dimensionless;
  f_tau has ms;
  xr_inf has dimensionless;
  xr_tau has ms;
  xs_inf has dimensionless;
  xs_tau has ms;
  Rkr has dimensionless;
  xK1_inf has dimensionless;
  wncx has dimensionless;
  INa has uA_per_uF;
  INaL has uA_per_uF;
  Ito has uA_per_uF;
  ICaL has uA_per_uF;
  IKr has uA_per_uF;
  IKs has uA_per_uF;
  IK1 has uA_per_uF;
  INaCa has uA_per_uF;
  i_ion has uA_per_uF;
  i_stim has uA_per_uF;

  // Assignment rules:
  m_inf := 1/(1 + exp(-(V - (-39))/8));
  m_tau := 0.06 + 0.55*exp(-((V - (-40))/20)^2);
  h_inf := 1/(1 + exp(-(V - (-66))/(-7)));
  h_tau := 1 + 18*exp(-((V - (-50))/15)^2);
  j_inf := 1/(1 + exp(-(V - (-66))/(-7)));
  j_tau := 12 + 60*exp(-((V - (-60))/20)^2);
  mL_inf := 1/(1 + exp(-(V - (-43))/8));
  mL_tau := 0.1 + 0.5*exp(-((V - (-40))/20)^2);
  hL_inf := 1/(1 + exp(-(V - (-85))/(-7)));
  hL_tau := 200;
  a_inf := 1/(1 + exp(-(V - (-2))/15));
  a_tau := 1.5 + 5*exp(-((V - (-30))/30)^2);
  iF_inf := 1/(1 + exp(-(V - (-40))/(-8)));
  iF_tau := 18 + 35*exp(-((V - (-40))/25)^2);
  d_inf := 1/(1 + exp(-(V - (-6))/6));
  d_tau := 1.5 + 8*exp(-((V - (-10))/25)^2);
  f_inf := 0.18 + 0.82*(1/(1 + exp(-(V - (-28))/(-7))));
  f_tau := 25 + 120*exp(-((V - (-25))/25)^2);
  xr_inf := 1/(1 + exp(-(V - (-20))/8));
  xr_tau := 40 + 180*exp(-((V - (-10))/30)^2);
  xs_inf := 1/(1 + exp(-(V - (-18))/14));
  xs_tau := 80 + 350*exp(-((V - 10)/40)^2);
  Rkr := 1/(1 + exp((V + 70)/25));
  xK1_inf := 1/(1 + exp((V + 100)/12));
  wncx := 1/(1 + exp(-(V + 30)/20));
  INa := gNa*m^3*h*j*(V - ENa)*block_INa;
  INaL := gNaL*mL*hL*(V - ENa)*block_INaL;
  Ito := gto*a*iF*(V - EK)*block_Ito;
  ICaL := gCaL*d*f*(V - ECaL)*block_ICaL;
  IKr := gKr*xr*Rkr*(V - EK)*block_IKr;
  IKs := gKs*xs^2*(V - EKs)*block_IKs;
  IK1 := gK1*xK1_inf*(V - EK);
  INaCa := gNaCa*wncx*(V - ENCX);
  i_ion := INa + INaL + Ito + ICaL + IKr + IKs + IK1 + INaCa;
  i_stim := piecewise(stim_amplitude, time - floor(time/stim_period)*stim_period < stim_duration, 0);

  // Rate rules:
  V' = -(i_ion + i_stim)/Cm;
  m' = (m_inf - m)/m_tau;
  h' = (h_inf - h)/h_tau;
  j' = (j_inf - j)/j_tau;
  mL' = (mL_inf - mL)/mL_tau;
  hL' = (hL_inf - hL)/hL_tau;
  a' = (a_inf - a)/a_tau;
  iF' = (iF_inf - iF)/iF_tau;
  d' = (d_inf - d)/d_tau;
  f' = (f_inf - f)/f_tau;
  xr' = (xr_inf - xr)/xr_tau;
  xs' = (xs_inf - xs)/xs_tau;

  // Unit definitions:
  unit mS_per_uF = 1e-3 siemens / (1e-6 farad);
  unit mV = 1e-3 volt;
  unit ms = 1e-3 second;
  unit uA_per_uF = 1e-6 ampere / (1e-6 farad);
  unit uF_per_cm2 = 1e-6 farad / (0.01 metre)^2;
end
